// SBML level 3 version 2

model anithetic_controller()
  // model units - substance: mole, time: second, extent: mole

  // Compartments:
  compartment default_compartment = 1 litre;

  // Species:
  species z1__mRNA in default_compartment = 0;
  species z1__protein in default_compartment = 0;
  species z2__mRNA in default_compartment = 0;
  species z2__protein in default_compartment = 0;
  species z2__omega in default_compartment;
  species z2__TF in default_compartment;
  species z12__mRNA in default_compartment = 0;
  species z12__protein in default_compartment = 0;
  species z12__TF in default_compartment = 0;
  species x__mRNA in default_compartment = 0;
  species x__protein in default_compartment = 0;
  species x__omega in default_compartment;
  species x__TF in default_compartment;
  species z_tot in default_compartment;

  // Parameters:
  z1__omega = 1 per_second;
  z1__phi = 1 per_second;
  z1__k = 1 per_second;
  z1__d = 0 per_second;
  z2__phi = 1 per_second;
  z2__k = 1 per_second;
  z2__d = 0 per_second;
  z2__h = 1 per_second;
  z2__omega_max = 1 per_second;
  z12__omega has per_second;
  z12__phi = 1 per_second;
  z12__k = 1 per_second;
  z12__d = 1 per_second;
  z12__h = 1 per_second;
  z12__omega_max = 1 per_second;
  x__phi = 1 per_second;
  x__k = 1 per_second;
  x__d = 1 per_second;
  x__h = 1 per_second;
  x__omega_max = 10 per_second;
  __t_end = 100 per_second;
  gamma = 1 per_second;

  // Assignment rules:
  z2__omega := z2__omega_max*z2__TF/z2__h;
  z12__omega := z12__omega_max*z12__TF/z12__h;
  x__omega := x__omega_max*x__TF/x__h;
  x__TF := z1__protein;
  z2__TF := x__protein;
  z_tot := z1__protein + z2__protein + z12__protein;

  // Reactions:
  z1___J0: => z1__mRNA; z1__omega;
  z1___J1: z1__mRNA => ; z1__phi*z1__mRNA;
  z1___J2: z1__mRNA => z1__mRNA + z1__protein; z1__k*z1__mRNA;
  z1___J3: z1__protein => ; z1__d*z1__protein;
  z2___J4: => z2__mRNA; z2__omega;  // modifiers: z2__omega
  z2___J5: z2__mRNA => ; z2__phi*z2__mRNA;
  z2___J6: z2__mRNA => z2__mRNA + z2__protein; z2__k*z2__mRNA;
  z2___J7: z2__protein => ; z2__d*z2__protein;
  z12___J8: => z12__mRNA; z12__omega;
  z12___J9: z12__mRNA => ; z12__phi*z12__mRNA;
  z12___J10: z12__mRNA => z12__mRNA + z12__protein; z12__k*z12__mRNA;
  z12___J11: z12__protein => ; z12__d*z12__protein;
  x___J12: => x__mRNA; x__omega;  // modifiers: x__omega
  x___J13: x__mRNA => ; x__phi*x__mRNA;
  x___J14: x__mRNA => x__mRNA + x__protein; x__k*x__mRNA;
  x___J15: x__protein => ; x__d*x__protein;
  _J16: z1__protein + z2__protein => z12__protein; gamma*z1__protein*z2__protein;

  // Unit definitions:
  unit per_second = 1 / second;
end
