// SBML level 3 version 2

model host_aware_antithetic_controller()
  // model units - substance: mole, time: second, extent: mole

  // Compartments:
  compartment default_compartment = 1 litre;

  // Species:
  species cell__s in default_compartment;
  species cell__m_h in default_compartment;
  species cell__p_r__nu_t in default_compartment;
  species cell__p_r__mu in default_compartment;
  species cell__p_r__r in default_compartment;
  species cell__p_r__m_h in default_compartment;
  species cell__p_r__J_host_sum in default_compartment;
  species cell__p_r__K_C0 in default_compartment;
  species cell__p_r__E_m in default_compartment;
  species cell__p_r__J in default_compartment;
  species cell__p_r__W in default_compartment;
  species cell__p_r__m in default_compartment = 100;
  species cell__p_r__r_t in default_compartment;
  species cell__p_nr__nu_t in default_compartment;
  species cell__p_nr__mu in default_compartment;
  species cell__p_nr__r in default_compartment;
  species cell__p_nr__m_h in default_compartment;
  species cell__p_nr__J_host_sum in default_compartment;
  species cell__p_nr__K_C0 in default_compartment;
  species cell__p_nr__E_m in default_compartment;
  species cell__p_nr__J in default_compartment;
  species cell__p_nr__W in default_compartment;
  species cell__p_nr__m in default_compartment = 100;
  species cell__nu_t in default_compartment;
  species cell__mu in default_compartment = 0.01;
  species cell__m_p in default_compartment;
  species cell__J_host_sum in default_compartment;
  species cell__WSum in default_compartment;
  species cell__phi_ht in default_compartment;
  species cell__r in default_compartment = 350;
  species cell__z1__nu_t in default_compartment;
  species cell__z1__mu in default_compartment;
  species cell__z1__r in default_compartment;
  species cell__z1__m_h in default_compartment;
  species cell__z1__J_host_sum in default_compartment;
  species cell__z1__K_C0 in default_compartment;
  species cell__z1__E_m in default_compartment;
  species cell__z1__J in default_compartment;
  species cell__z1__W in default_compartment;
  species cell__z1__m in default_compartment = 0;
  species cell__z2__nu_t in default_compartment;
  species cell__z2__mu in default_compartment;
  species cell__z2__r in default_compartment;
  species cell__z2__m_h in default_compartment;
  species cell__z2__J_host_sum in default_compartment;
  species cell__z2__omega in default_compartment;
  species cell__z2__K_C0 in default_compartment;
  species cell__z2__E_m in default_compartment;
  species cell__z2__J in default_compartment;
  species cell__z2__W in default_compartment;
  species cell__z2__m in default_compartment = 0;
  species cell__z2__TF in default_compartment;
  species cell__z12__nu_t in default_compartment;
  species cell__z12__mu in default_compartment;
  species cell__z12__r in default_compartment;
  species cell__z12__m_h in default_compartment;
  species cell__z12__J_host_sum in default_compartment;
  species cell__z12__K_C0 in default_compartment;
  species cell__z12__E_m in default_compartment;
  species cell__z12__J in default_compartment;
  species cell__z12__W in default_compartment;
  species cell__z12__m in default_compartment = 0;
  species cell__x__nu_t in default_compartment;
  species cell__x__mu in default_compartment;
  species cell__x__r in default_compartment;
  species cell__x__m_h in default_compartment;
  species cell__x__J_host_sum in default_compartment;
  species cell__x__omega in default_compartment;
  species cell__x__K_C0 in default_compartment;
  species cell__x__E_m in default_compartment;
  species cell__x__J in default_compartment;
  species cell__x__W in default_compartment;
  species cell__x__m in default_compartment = 0;
  species cell__x__TF in default_compartment;
  species cell__ref in default_compartment;
  species mass__mu in default_compartment;
  species mass__m_h in default_compartment;

  // Parameters:
  cell__p_r__N = 55 per_second;
  cell__p_r__omega = 7.33 per_second;
  cell__p_r__d_m = 0.16 per_second;
  cell__p_r__k_b = 4.7627 per_second;
  cell__p_r__k_u = 119.7956 per_second;
  cell__p_r__l_p = 195 per_second;
  cell__p_r__l_e = 25 per_second;
  cell__p_r__weigth = 0.0045 per_second;
  cell__p_nr__N = 1735 per_second;
  cell__p_nr__omega = 0.0361 per_second;
  cell__p_nr__d_m = 0.2 per_second;
  cell__p_nr__k_b = 12.4404 per_second;
  cell__p_nr__k_u = 10.0454 per_second;
  cell__p_nr__l_p = 333 per_second;
  cell__p_nr__l_e = 25 per_second;
  cell__K_sc = 0.1802 per_second;
  cell__nu = 1260 per_second;
  cell__m_aa = 1.826e-7 per_second;
  cell__phi_m = 0.9473 per_second;
  cell__z1__N = 1 per_second;
  cell__z1__omega = 70 per_second;
  cell__z1__d_m = 0.16 per_second;
  cell__z1__k_b = 4.7627 per_second;
  cell__z1__k_u = 119.7956 per_second;
  cell__z1__l_p = 195 per_second;
  cell__z1__l_e = 25 per_second;
  cell__z2__N = 1 per_second;
  cell__z2__d_m = 0.16 per_second;
  cell__z2__k_b = 4.7627 per_second;
  cell__z2__k_u = 119.7956 per_second;
  cell__z2__l_p = 195 per_second;
  cell__z2__l_e = 25 per_second;
  cell__z2__omega_max = 100 per_second;
  cell__z2__h = 100 per_second;
  cell__z12__N = 1 per_second;
  cell__z12__omega = 0 per_second;
  cell__z12__d_m = 0.16 per_second;
  cell__z12__k_b = 4.7627 per_second;
  cell__z12__k_u = 119.7956 per_second;
  cell__z12__l_p = 195 per_second;
  cell__z12__l_e = 25 per_second;
  cell__x__N = 1 per_second;
  cell__x__d_m = 0.16 per_second;
  cell__x__k_b = 4.7627 per_second;
  cell__x__k_u = 119.7956 per_second;
  cell__x__l_p = 195 per_second;
  cell__x__l_e = 25 per_second;
  cell__x__omega_max = 100 per_second;
  cell__x__h = 100 per_second;
  cell____burden = 1 per_second;
  cell____dilution = 1 per_second;
  cell__gamma = 100 per_second;
  mass__c_1 = 239089 per_second;
  mass__c_2 = 7432 per_second;
  mass__c_3 = 37.06 per_second;
  __t_end = 1000 per_second;
  s = 3.6 per_second;

  // Assignment rules:
  cell__p_r__K_C0 := cell__p_r__k_b/(cell__p_r__k_u + cell__p_r__nu_t/cell__p_r__l_e);
  cell__p_r__E_m := 3.459;
  cell__p_r__J := cell__p_r__E_m*cell__p_r__omega/(cell__p_r__d_m/cell__p_r__K_C0 + cell__p_r__mu*cell__p_r__r);
  cell__p_r__W := cell__p_r__N*(1 + 1/cell__p_r__E_m)*cell__p_r__J;
  cell__p_r__r_t := cell__p_r__m/cell__p_r__weigth;
  cell__p_nr__K_C0 := cell__p_nr__k_b/(cell__p_nr__k_u + cell__p_nr__nu_t/cell__p_nr__l_e);
  cell__p_nr__E_m := 6.3492;
  cell__p_nr__J := cell__p_nr__E_m*cell__p_nr__omega/(cell__p_nr__d_m/cell__p_nr__K_C0 + cell__p_nr__mu*cell__p_nr__r);
  cell__p_nr__W := cell__p_nr__N*(1 + 1/cell__p_nr__E_m)*cell__p_nr__J;
  cell__p_r__nu_t := cell__nu_t;
  cell__p_r__mu := cell__mu;
  cell__p_r__r := cell__r;
  cell__p_r__m_h := cell__m_h;
  cell__p_r__J_host_sum := cell__J_host_sum;
  cell__p_nr__nu_t := cell__nu_t;
  cell__p_nr__mu := cell__mu;
  cell__p_nr__r := cell__r;
  cell__p_nr__m_h := cell__m_h;
  cell__p_nr__J_host_sum := cell__J_host_sum;
  cell__J_host_sum := cell__p_r__N*cell__p_r__J + cell__p_nr__N*cell__p_nr__J;
  cell__nu_t := cell__nu*cell__s/(cell__s + cell__K_sc);
  cell__phi_ht := (cell__p_r__N*cell__p_r__J + cell__p_nr__N*cell__p_nr__J)/(1 + cell__WSum);
  cell__WSum := cell__p_r__W + cell__p_nr__W + (cell__z1__W + cell__z2__W + cell__z12__W + cell__x__W)*cell____burden;
  cell__m_p := cell__p_r__m + cell__p_nr__m + (cell__z1__m + cell__z2__m + cell__z12__m + cell__x__m)*cell____burden;
  cell__z1__K_C0 := cell__z1__k_b/(cell__z1__k_u + cell__z1__nu_t/cell__z1__l_e);
  cell__z1__E_m := cell__z1__l_p/cell__z1__l_e*(1 - cell__z1__l_p/(cell__z1__l_p + cell__z1__l_e)^(cell__z1__l_p/cell__z1__l_e));
  cell__z1__J := cell__z1__E_m*cell__z1__omega/(cell__z1__d_m/cell__z1__K_C0 + cell__z1__mu*cell__z1__r);
  cell__z1__W := cell__z1__N*(1 + 1/cell__z1__E_m)*cell__z1__J;
  cell__z2__K_C0 := cell__z2__k_b/(cell__z2__k_u + cell__z2__nu_t/cell__z2__l_e);
  cell__z2__E_m := cell__z2__l_p/cell__z2__l_e*(1 - cell__z2__l_p/(cell__z2__l_p + cell__z2__l_e)^(cell__z2__l_p/cell__z2__l_e));
  cell__z2__J := cell__z2__E_m*cell__z2__omega/(cell__z2__d_m/cell__z2__K_C0 + cell__z2__mu*cell__z2__r);
  cell__z2__W := cell__z2__N*(1 + 1/cell__z2__E_m)*cell__z2__J;
  cell__z2__omega := cell__z2__omega_max*cell__z2__TF/cell__z2__h;
  cell__z12__K_C0 := cell__z12__k_b/(cell__z12__k_u + cell__z12__nu_t/cell__z12__l_e);
  cell__z12__E_m := cell__z12__l_p/cell__z12__l_e*(1 - cell__z12__l_p/(cell__z12__l_p + cell__z12__l_e)^(cell__z12__l_p/cell__z12__l_e));
  cell__z12__J := cell__z12__E_m*cell__z12__omega/(cell__z12__d_m/cell__z12__K_C0 + cell__z12__mu*cell__z12__r);
  cell__z12__W := cell__z12__N*(1 + 1/cell__z12__E_m)*cell__z12__J;
  cell__x__K_C0 := cell__x__k_b/(cell__x__k_u + cell__x__nu_t/cell__x__l_e);
  cell__x__E_m := cell__x__l_p/cell__x__l_e*(1 - cell__x__l_p/(cell__x__l_p + cell__x__l_e)^(cell__x__l_p/cell__x__l_e));
  cell__x__J := cell__x__E_m*cell__x__omega/(cell__x__d_m/cell__x__K_C0 + cell__x__mu*cell__x__r);
  cell__x__W := cell__x__N*(1 + 1/cell__x__E_m)*cell__x__J;
  cell__x__omega := cell__x__omega_max*cell__x__TF/cell__x__h;
  cell__x__TF := cell__z1__m;
  cell__z2__TF := cell__x__m;
  cell__ref := cell__z1__omega/cell__z2__omega_max*cell__z2__h;
  cell__z1__nu_t := cell__nu_t;
  cell__z1__mu := cell__mu;
  cell__z1__r := cell__r;
  cell__z1__m_h := cell__m_h;
  cell__z1__J_host_sum := cell__J_host_sum;
  cell__z2__nu_t := cell__nu_t;
  cell__z2__mu := cell__mu;
  cell__z2__r := cell__r;
  cell__z2__m_h := cell__m_h;
  cell__z2__J_host_sum := cell__J_host_sum;
  cell__z12__nu_t := cell__nu_t;
  cell__z12__mu := cell__mu;
  cell__z12__r := cell__r;
  cell__z12__m_h := cell__m_h;
  cell__z12__J_host_sum := cell__J_host_sum;
  cell__x__nu_t := cell__nu_t;
  cell__x__mu := cell__mu;
  cell__x__r := cell__r;
  cell__x__m_h := cell__m_h;
  cell__x__J_host_sum := cell__J_host_sum;
  cell__x__TF := cell__z1__m;
  mass__m_h := mass__c_1*mass__mu*mass__mu + mass__c_2*mass__mu + mass__c_3;
  cell__s := s;
  cell__m_h := mass__m_h;
  mass__mu := cell__mu;

  // Algebraic rules:
  0 = cell__r - cell__phi_m*cell__p_r__r_t/(1 + cell__WSum);
  0 = cell__mu - cell__m_aa/cell__m_h*cell__nu_t*cell__phi_ht*cell__phi_m*cell__p_r__r_t;

  // Reactions:
  cell__p_r___J0: => cell__p_r__m; (cell__p_r__m_h*cell__p_r__N*cell__p_r__J/cell__p_r__J_host_sum - cell__p_r__m)*cell__p_r__mu;  // modifiers: cell__p_r__m_h, cell__p_r__J, cell__p_r__J_host_sum, cell__p_r__mu
  cell__p_nr___J1: => cell__p_nr__m; (cell__p_nr__m_h*cell__p_nr__N*cell__p_nr__J/cell__p_nr__J_host_sum - cell__p_nr__m)*cell__p_nr__mu;  // modifiers: cell__p_nr__m_h, cell__p_nr__J, cell__p_nr__J_host_sum, cell__p_nr__mu
  cell__z1___J2: => cell__z1__m; (cell__z1__m_h*cell__z1__N*cell__z1__J/cell__z1__J_host_sum - cell__z1__m)*cell__z1__mu;  // modifiers: cell__z1__m_h, cell__z1__J, cell__z1__J_host_sum, cell__z1__mu
  cell__z2___J3: => cell__z2__m; (cell__z2__m_h*cell__z2__N*cell__z2__J/cell__z2__J_host_sum - cell__z2__m)*cell__z2__mu;  // modifiers: cell__z2__m_h, cell__z2__J, cell__z2__J_host_sum, cell__z2__mu
  cell__z12___J4: => cell__z12__m; (cell__z12__m_h*cell__z12__N*cell__z12__J/cell__z12__J_host_sum - cell__z12__m)*cell__z12__mu;  // modifiers: cell__z12__m_h, cell__z12__J, cell__z12__J_host_sum, cell__z12__mu
  cell__x___J5: => cell__x__m; (cell__x__m_h*cell__x__N*cell__x__J/cell__x__J_host_sum - cell__x__m)*cell__x__mu;  // modifiers: cell__x__m_h, cell__x__J, cell__x__J_host_sum, cell__x__mu
  cell___J6: cell__z1__m + cell__z2__m => cell__z12__m; cell__gamma*cell__z1__m*cell__z2__m;
  cell___J7: => cell__z1__m; cell__mu*cell__z1__m*(1 - cell____dilution);  // modifiers: cell__mu
  cell___J8: => cell__z2__m; cell__mu*cell__z2__m*(1 - cell____dilution);  // modifiers: cell__mu

  // Unit definitions:
  unit per_second = 1 / second;
end
