// SBML level 3 version 2

model non_ribosomal_protein()
  // model units - substance: mole, time: second, extent: mole

  // Compartments:
  compartment default_compartment = 1 litre;

  // Species:
  species no_ribo__nu in default_compartment;
  species no_ribo__mu in default_compartment;
  species no_ribo__r in default_compartment;
  species no_ribo__m_h in default_compartment;
  species no_ribo__J_host_sum in default_compartment;
  species no_ribo__K_C0 in default_compartment;
  species no_ribo__E_m in default_compartment;
  species no_ribo__J in default_compartment;
  species no_ribo__m in default_compartment = 100;

  // Parameters:
  no_ribo__N = 1735 per_second;
  no_ribo__omega = 0.0361 per_second;
  no_ribo__d_m = 0.2 per_second;
  no_ribo__k_b = 12.4404 per_second;
  no_ribo__k_u = 10.0454 per_second;
  no_ribo__l_p = 333 per_second;
  no_ribo__l_e = 25 per_second;

  // Assignment rules:
  no_ribo__K_C0 := no_ribo__k_b/(no_ribo__k_u + no_ribo__nu/no_ribo__l_e);
  no_ribo__E_m := 6.3492;
  no_ribo__J := no_ribo__E_m*no_ribo__omega/(no_ribo__d_m/no_ribo__K_C0 + no_ribo__mu*no_ribo__r);
  no_ribo__nu := 1;
  no_ribo__mu := 1;
  no_ribo__r := 1;
  no_ribo__m_h := 1;
  no_ribo__J_host_sum := 1;

  // Rate rules:
  no_ribo__m' = (no_ribo__m_h*no_ribo__N*no_ribo__J/no_ribo__J_host_sum - no_ribo__m)*no_ribo__mu;

  // Unit definitions:
  unit per_second = 1 / second;
end
