// SBML level 3 version 2

model protein_expression()
  // model units - substance: mole, time: second, extent: mole

  // Compartments:
  compartment default_compartment = 1 litre;

  // Species:
  species GFP__mRNA in default_compartment = 0;
  species GFP__protein in default_compartment = 0;

  // Parameters:
  GFP__omega = 1 per_second;
  GFP__phi = 1 per_second;
  GFP__k = 1 per_second;
  GFP__d = 1 per_second;

  // Reactions:
  GFP___J0: => GFP__mRNA; GFP__omega;
  GFP___J1: GFP__mRNA => ; GFP__phi*GFP__mRNA;
  GFP___J2: GFP__mRNA => GFP__mRNA + GFP__protein; GFP__k*GFP__mRNA;
  GFP___J3: GFP__protein => ; GFP__d*GFP__protein;

  // Unit definitions:
  unit per_second = 1 / second;
end
