// SBML level 3 version 2

model protein_expression_induced()
  // model units - substance: mole, time: second, extent: mole

  // Compartments:
  compartment default_compartment = 1 litre;

  // Species:
  species A__mRNA in default_compartment = 0;
  species A__protein in default_compartment = 0;
  species B__mRNA in default_compartment = 0;
  species B__protein in default_compartment = 0;
  species B__omega in default_compartment;
  species B__TF in default_compartment;

  // Parameters:
  A__omega = 1 per_second;
  A__phi = 1 per_second;
  A__k = 1 per_second;
  A__d = 1 per_second;
  B__phi = 1 per_second;
  B__k = 1 per_second;
  B__d = 1 per_second;
  B__h = 1 per_second;
  B__omega_max = 1 per_second;

  // Assignment rules:
  B__omega := B__omega_max*B__TF/(B__TF + B__h);
  B__TF := A__protein;

  // Reactions:
  A___J0: => A__mRNA; A__omega;
  A___J1: A__mRNA => ; A__phi*A__mRNA;
  A___J2: A__mRNA => A__mRNA + A__protein; A__k*A__mRNA;
  A___J3: A__protein => ; A__d*A__protein;
  B___J4: => B__mRNA; B__omega;  // modifiers: B__omega
  B___J5: B__mRNA => ; B__phi*B__mRNA;
  B___J6: B__mRNA => B__mRNA + B__protein; B__k*B__mRNA;
  B___J7: B__protein => ; B__d*B__protein;

  // Unit definitions:
  unit per_second = 1 / second;
end
