// SBML level 3 version 2

model ribosomal_protein()
  // model units - substance: mole, time: second, extent: mole

  // Compartments:
  compartment default_compartment = 1 litre;

  // Species:
  species ribo__nu in default_compartment;
  species ribo__mu in default_compartment;
  species ribo__r in default_compartment;
  species ribo__m_h in default_compartment;
  species ribo__J_host_sum in default_compartment;
  species ribo__K_C0 in default_compartment;
  species ribo__E_m in default_compartment;
  species ribo__J in default_compartment;
  species ribo__m in default_compartment = 100;
  species ribo__r_t in default_compartment;

  // Parameters:
  ribo__N = 55 per_second;
  ribo__omega = 7.33 per_second;
  ribo__d_m = 0.16 per_second;
  ribo__k_b = 4.7627 per_second;
  ribo__k_u = 119.7956 per_second;
  ribo__l_p = 195 per_second;
  ribo__l_e = 25 per_second;
  ribo__weigth = 0.0045 per_second;

  // Assignment rules:
  ribo__K_C0 := ribo__k_b/(ribo__k_u + ribo__nu/ribo__l_e);
  ribo__E_m := 3.459;
  ribo__J := ribo__E_m*ribo__omega/(ribo__d_m/ribo__K_C0 + ribo__mu*ribo__r);
  ribo__r_t := ribo__m/ribo__weigth;
  ribo__nu := 1;
  ribo__mu := 1;
  ribo__r := 1;
  ribo__m_h := 1;
  ribo__J_host_sum := 1;

  // Rate rules:
  ribo__m' = (ribo__m_h*ribo__N*ribo__J/ribo__J_host_sum - ribo__m)*ribo__mu;

  // Unit definitions:
  unit per_second = 1 / second;
end
