// SBML level 3 version 2

model continous()
  // model units - substance: mole, time: second, extent: mole

  // Compartments:
  compartment default_compartment = 1 litre;

  // Species:
  species bio__m_p in default_compartment;
  species bio__mu in default_compartment;
  species bio__F_in in default_compartment;
  species bio__F_out in default_compartment;
  species bio__V in default_compartment = 1;
  species bio__V_feed in default_compartment = 0;
  species bio__V_out in default_compartment = 0;
  species bio__N in default_compartment = 50000000000;
  species bio__x in default_compartment;
  species bio__OD in default_compartment;
  species bio__s in default_compartment = 3.6;
  species bio__S in default_compartment = 0;
  species bio__x_ref in default_compartment = 1;
  species bio__D in default_compartment;

  // Parameters:
  __t_end = 1000 per_second;
  m_p = 433 per_second;
  K_s = 0.1802 per_second;
  bio__y = 0.45 per_second;
  bio__s_f = 3.6 per_second;
  bio__nOD = 1000000000000 per_second;

  // Assignment rules:
  bio__x := bio__N*bio__m_p*1e-15;
  bio__OD := bio__N/bio__nOD;
  bio__D := bio__mu*bio__x/bio__x_ref;
  bio__F_in := bio__D*bio__V;
  bio__F_out := bio__D*bio__V;
  bio__m_p := m_p;
  bio__mu := log10(2)/24*bio__s/(bio__s + K_s);

  // Rate rules:
  bio__V' = bio__F_in - bio__F_out;
  bio__V_feed' = bio__F_in;
  bio__V_out' = bio__F_out;
  bio__N' = bio__mu*bio__N - bio__F_in/bio__V*bio__N;
  bio__s' = bio__F_in/bio__V*(bio__s_f - bio__s) - 1/bio__y*bio__mu*bio__x;
  bio__S' = bio__F_out*bio__s;

  // Unit definitions:
  unit per_second = 1 / second;
end
