// SBML level 3 version 2

model protein_ribosomal()
  // model units - substance: mole, time: second, extent: mole

  // Compartments:
  compartment default_compartment = 1 litre;

  // Species:
  species p_nr__nu in default_compartment;
  species p_nr__mu in default_compartment;
  species p_nr__r in default_compartment;
  species p_nr__m_h in default_compartment;
  species p_nr__J_host_sum in default_compartment;
  species p_nr__K_C0 in default_compartment;
  species p_nr__E_m in default_compartment;
  species p_nr__J in default_compartment;
  species p_nr__m in default_compartment = 100;
  species p_nr__r_t in default_compartment;

  // Parameters:
  p_nr__N = 55 per_second;
  p_nr__omega = 7.33 per_second;
  p_nr__d_m = 0.16 per_second;
  p_nr__k_b = 4.7627 per_second;
  p_nr__k_u = 119.7956 per_second;
  p_nr__l_p = 195 per_second;
  p_nr__l_e = 25 per_second;
  p_nr__weigth = 0.0045 per_second;

  // Assignment rules:
  p_nr__K_C0 := p_nr__k_b/(p_nr__k_u + p_nr__nu/p_nr__l_e);
  p_nr__E_m := 3.459;
  p_nr__J := p_nr__E_m*p_nr__omega/(p_nr__d_m/p_nr__K_C0 + p_nr__mu*p_nr__r);
  p_nr__r_t := p_nr__m/p_nr__weigth;
  p_nr__nu := 1;
  p_nr__mu := 1;
  p_nr__r := 1;
  p_nr__m_h := 1;
  p_nr__J_host_sum := 1;

  // Rate rules:
  p_nr__m' = (p_nr__m_h*p_nr__N*p_nr__J/p_nr__J_host_sum - p_nr__m)*p_nr__mu;

  // Unit definitions:
  unit per_second = 1 / second;
end
