// SBML level 3 version 2

model wild_type()
  // model units - substance: mole, time: second, extent: mole

  // Compartments:
  compartment default_compartment = 1 litre;

  // Species:
  species wt__s in default_compartment;
  species wt__m_h in default_compartment;
  species wt__p_r__nu in default_compartment;
  species wt__p_r__mu in default_compartment;
  species wt__p_r__r in default_compartment;
  species wt__p_r__m_h in default_compartment;
  species wt__p_r__J_host_sum in default_compartment;
  species wt__p_r__K_C0 in default_compartment;
  species wt__p_r__E_m in default_compartment;
  species wt__p_r__J in default_compartment;
  species wt__p_r__m in default_compartment = 100;
  species wt__p_r__r_t in default_compartment;
  species wt__p_nr__nu in default_compartment;
  species wt__p_nr__mu in default_compartment;
  species wt__p_nr__r in default_compartment;
  species wt__p_nr__m_h in default_compartment;
  species wt__p_nr__J_host_sum in default_compartment;
  species wt__p_nr__K_C0 in default_compartment;
  species wt__p_nr__E_m in default_compartment;
  species wt__p_nr__J in default_compartment;
  species wt__p_nr__m in default_compartment = 100;
  species wt__nu in default_compartment;
  species wt__mu in default_compartment = 0.01;
  species wt__m_p in default_compartment;
  species wt__J_sum in default_compartment;
  species wt__J_host_sum in default_compartment;
  species wt__J_sum_E in default_compartment;
  species wt__phi_b_t in default_compartment;
  species wt__r in default_compartment = 350;

  // Parameters:
  wt__p_r__N = 55 per_second;
  wt__p_r__omega = 7.33 per_second;
  wt__p_r__d_m = 0.16 per_second;
  wt__p_r__k_b = 4.7627 per_second;
  wt__p_r__k_u = 119.7956 per_second;
  wt__p_r__l_p = 195 per_second;
  wt__p_r__l_e = 25 per_second;
  wt__p_r__weigth = 0.0045 per_second;
  wt__p_nr__N = 1735 per_second;
  wt__p_nr__omega = 0.0361 per_second;
  wt__p_nr__d_m = 0.2 per_second;
  wt__p_nr__k_b = 12.4404 per_second;
  wt__p_nr__k_u = 10.0454 per_second;
  wt__p_nr__l_p = 333 per_second;
  wt__p_nr__l_e = 25 per_second;
  wt__K_s = 0.1802 per_second;
  wt__nu_max = 1260 per_second;
  wt__m_aa = 1.826e-7 per_second;
  wt__phi_t = 0.9473 per_second;
  s = 3.6 per_second;
  m_h = 450 per_second;

  // Assignment rules:
  wt__p_r__K_C0 := wt__p_r__k_b/(wt__p_r__k_u + wt__p_r__nu/wt__p_r__l_e);
  wt__p_r__E_m := 3.459;
  wt__p_r__J := wt__p_r__E_m*wt__p_r__omega/(wt__p_r__d_m/wt__p_r__K_C0 + wt__p_r__mu*wt__p_r__r);
  wt__p_r__r_t := wt__p_r__m/wt__p_r__weigth;
  wt__p_r__nu := wt__nu;
  wt__p_r__mu := wt__mu;
  wt__p_r__r := wt__r;
  wt__p_r__m_h := wt__m_h;
  wt__p_r__J_host_sum := wt__J_host_sum;
  wt__p_nr__K_C0 := wt__p_nr__k_b/(wt__p_nr__k_u + wt__p_nr__nu/wt__p_nr__l_e);
  wt__p_nr__E_m := 6.3492;
  wt__p_nr__J := wt__p_nr__E_m*wt__p_nr__omega/(wt__p_nr__d_m/wt__p_nr__K_C0 + wt__p_nr__mu*wt__p_nr__r);
  wt__p_nr__nu := wt__nu;
  wt__p_nr__mu := wt__mu;
  wt__p_nr__r := wt__r;
  wt__p_nr__m_h := wt__m_h;
  wt__p_nr__J_host_sum := wt__J_host_sum;
  wt__nu := wt__nu_max*wt__s/(wt__s + wt__K_s);
  wt__m_p := wt__p_r__m + wt__p_nr__m;
  wt__J_sum := wt__p_r__N*wt__p_r__J + wt__p_nr__N*wt__p_nr__J;
  wt__J_host_sum := wt__p_r__N*wt__p_r__J + wt__p_nr__N*wt__p_nr__J;
  wt__J_sum_E := wt__p_r__N*(1 + 1/wt__p_r__E_m)*wt__p_r__J + wt__p_nr__N*(1 + 1/wt__p_nr__E_m)*wt__p_nr__J;
  wt__phi_b_t := wt__J_host_sum/(1 + wt__J_sum_E);
  wt__s := s;
  wt__m_h := m_h;

  // Rate rules:
  wt__p_r__m' = (wt__p_r__m_h*wt__p_r__N*wt__p_r__J/wt__p_r__J_host_sum - wt__p_r__m)*wt__p_r__mu;
  wt__p_nr__m' = (wt__p_nr__m_h*wt__p_nr__N*wt__p_nr__J/wt__p_nr__J_host_sum - wt__p_nr__m)*wt__p_nr__mu;

  // Algebraic rules:
  0 = wt__mu - wt__m_aa/wt__m_h*wt__nu*wt__phi_b_t*wt__phi_t*wt__p_r__r_t;
  0 = wt__r - wt__phi_t*wt__p_r__r_t/(1 + wt__J_sum_E);

  // Unit definitions:
  unit per_second = 1 / second;
end
